// COMSOL Multiphysics 5.3.0.260 model "HH_model_single_fin.mph"
// HH model
// Outline of the model tree
// Components: comp2 "Component 2", comp4 "Component 4"
// Unit system: none

Parameters
  Cm = 1[uF/cm^2]
  gK = 36[mS/cm^2]
  gNa = 120[mS/cm^2]
  gL = 0.3[mS/cm^2]
  VNa = 55[mV]
  VK = -72[mV]
  VL = -50[mV]
  u0 = -60.15601065947658[mV]
  m0 = 0.0519668337743450
  n0 = 0.315288898076907
  h0 = 0.601566023917700
  Rinsq = 0.05[kohm*cm]
  diam = 0.1[cm]
  sigmaNa = 10
  sigmaax = 1/Rinsq[mS/cm]
  K = diam/(4*(Rinsq))
  Iamp = 1/(pi*diam)  // [uA/cm^2]
  fr = 0  // Hz
  ph = 0
  geom = 0
  geom2 = 0
  Rel = 0.3
  dx = 5
  Hel = 0.1
  dxR = 0
  T = 298  // K
  kv = 3^((temp-6.3)/10)
  temp = 6.3

Functions
  an1: Analytic | funcname = am; expr = -0.1 * (35+u) / (exp(-0.1*(35+u))-1) [1/s]; args = u
  an2: Analytic | funcname = bm; expr = 4 * exp(-(60+u)/18) [1/s]; args = u
  an3: Analytic | funcname = an; expr = 0.01 * (-(50+u)) / (exp(-0.1*(50+u)) - 1); args = u
  an4: Analytic | funcname = bn; expr = 0.125 * exp(-(60+u)/80); args = u
  an5: Analytic | funcname = ah; expr = 0.07 * exp(-(60+u)/20); args = u
  an6: Analytic | funcname = bh; expr = 1 / (exp(-(30+u)/10) + 1); args = u
  rect1: Rectangle | lower = 1; upper = 2.1
  rect2: Rectangle | lower = 10; upper = 50; smooth = 0.5
  an7: Analytic | funcname = R0t; expr = R0/(1+1000*rect2(t)); args = t

Couplings
  linext4: LinearExtrusion on all domains
    opname = linext1
    srcvertex1 = boundaries 1
    srcvertex2 = boundaries 4
    dstvertex1 = points 6
    dstvertex2 = points 7
    dstgeom = geom4
    srcmap = x
  linext5: LinearExtrusion on boundaries 9
    opname = linext
    srcvertex1 = points 6
    srcvertex2 = points 7
    dstvertex1 = boundaries 1
    dstvertex2 = boundaries 4
    dstgeom = geom2
    srcmap = {r, z}

Probes
  bnd2: Boundary "eap" [comp4] on boundaries 13
    expr = u3
    unit = 1
    descr = EAP
    frame = spatial
    axisym = 2d
    table = default
  bnd3: Boundary "eap noi" [comp4] on boundaries 13
    expr = u5
    unit = 1
    descr = AP only
    frame = spatial
    axisym = 2d
    table = default
  pdom6: DomainPoint "Domain Point Probe 6" [comp4] (disabled) | coords = {diam/2, 4.9}
    ppb6: PointExpr "Point Probe Expression 6" | expr = u3; unit = 1; descr = Dependent variable u3
  var1: GlobalVariable "Global Variable Probe 1" [comp4] | expr = bnd2-bnd3; unit = 1

Coordinate systems
  sys3: Boundary "Boundary System 3" [geom4]

Geometry
  geom2 "Geometry 2" [comp2] (1D, length unit m)
    i1: Interval | intervals = many; p2 = 60; p = 0, 0.2,0.4,60
    fin: Finalize "Form Union"
  geom4 "Geometry 4" [comp4] (2D axisymmetric, length unit m)
    ls1: LineSegment | specify1 = coord; coord1 = {diam/2, 0}; specify2 = coord; coord2 = {diam/2, 60}
    r1: Rectangle | pos = {(Rel-diam/2)/2+diam/2, 30}; base = center; size = {Rel-diam/2, 61}
    ls2: LineSegment | specify1 = coord; coord1 = {Rel, 18.65+dxR}; specify2 = coord; coord2 = {Rel, 18.65 + Hel + dxR}
    ls6: LineSegment | specify1 = coord; coord1 = {Rel, 18.85+ geom}; specify2 = coord; coord2 = {Rel, 18.85+ Hel+geom}
    ls7: LineSegment
      specify1 = coord
      coord1 = {Rel, 19.35 + geom + geom2}
      specify2 = coord
      coord2 = {Rel, 19.35 +Hel+ geom + geom2}
    r2: Rectangle | pos = {0, 60}; size = {diam/2, 0.5}
    r3: Rectangle | pos = {0, -0.5}; size = {diam/2, 0.5}
    fin: Finalize "Form Union"

Physics
  g: GeneralFormPDE [geom4] on all domains
    dependent variable u3
    gfeq1: GeneralFormPDE (default) | f = sigmaNa*u3r/r; Ga = {-sigmaNa*u3r, -sigmaNa*u3z}; da = 0
    zflx1: ZeroFluxBoundary "Zero Flux 1" (default)
    init1: init "Initial Values 1" (default)
    flux1: FluxBoundary "Flux/Source 1" on boundaries 15 | g = 100*Iamp*(0.1/Hel)*cos((fr/1000)*2*pi*t+ph*pi/2); q = 0
    flux2: FluxBoundary "Flux/Source 2" on boundaries 17 | g = -100*Iamp*(0.1/Hel)*cos((fr/1000)*2*pi*t+ph*pi/2); q = 0
    dir2: DirichletBoundary "Dirichlet Boundary Condition 2" on boundaries 5 | r = 0; useDirichletCondition = 1
    flux3: FluxBoundary "Flux/Source 3" on boundaries 9
      g = comp2.linext1(Cm*d(u,t) - (-gK * (n^4) * (u-VK) - gNa * (m^3) * h * (u-VNa) - gL * (u-VL)))
  g5: GeneralFormPDE [geom4] on all domains
    dependent variable u5
    gfeq1: GeneralFormPDE (default) | f = sigmaNa*u5r/r; Ga = {-sigmaNa*u5r, -sigmaNa*u5z}; da = 0
    zflx1: ZeroFluxBoundary "Zero Flux 1" (default)
    init1: init "Initial Values 1" (default)
    dir2: DirichletBoundary "Dirichlet Boundary Condition 2" on boundaries 5 | r = 0
    flux5: FluxBoundary "Flux/Source 5" on boundaries 9
      g = comp2.linext1(Cm*d(u2,t) - (-gK * (n2^4) * (u2-VK) - gNa * (m2^3) * h2 * (u2-VNa) - gL * (u2-VL)))
  g2: GeneralFormPDE [geom2] on all domains
    dependent variable u2 = {u, m, n, h}
    gfeq1: GeneralFormPDE (default)
      f = {(-gK * (n^4) * (u-VK) - gNa * (m^3) * h * (u-VNa) - gL * (u-VL)), kv*(am(u) * (1-m) - bm(u) * m), kv*(an(u) * (1-n) - bn(u) * n), kv*(ah(u) * (1-h) - bh(u) * h)}
      Ga = {-K*(ux)-(K*comp4.linext(u3z)-K*comp4.linext(u5z)), 0, 0, 0}
      da = {Cm, 0, 0, 0, 0, 1, 0, 0, 0, 0, 1, 0, 0, 0, 0, 1}
    zflx1: ZeroFluxBoundary "Zero Flux 1" (default)
    init1: init "Initial Values 1" (default) | u = u0; m = m0; n = n0; h = h0
    src2: SourceTerm "Source 2" on domains 1 | f = {-900*rect1(t), 0, 0, 0}
    src3: SourceTerm "Source 3" on domains 2 | f = {900*rect1(t), 0, 0, 0}
  g9: GeneralFormPDE [geom2] on all domains
    dependent variable u10 = {u2, m2, n2, h2}
    gfeq1: GeneralFormPDE (default)
      f = {(-gK * (n2^4) * (u2-VK) - gNa * (m2^3) * h2 * (u2-VNa) - gL * (u2-VL)), kv*(am(u2) * (1-m2) - bm(u2) * m2), kv*(an(u2) * (1-n2) - bn(u2) * n2), kv*(ah(u2) * (1-h2) - bh(u2) * h2)}
      Ga = {-K*u2x, 0, 0, 0}
      da = {Cm, 0, 0, 0, 0, 1, 0, 0, 0, 0, 1, 0, 0, 0, 0, 1}
    zflx1: ZeroFluxBoundary "Zero Flux 1" (default)
    init1: init "Initial Values 1" (default) | u2 = u0; m2 = m0; n2 = n0; h2 = h0
    src1: SourceTerm "Source 1" on domains 1 | f = {-900*rect1(t), 0, 0, 0}
    src2: SourceTerm "Source 2" on domains 2 | f = {900*rect1(t), 0, 0, 0}

Mesh
  mesh2 "Mesh 2" [geom2]
    size: MeshSizeDefault | hauto = 4
    edg1: Edge on remaining entities
      dis1: Distribution on domains 1 | numelem = 4
      dis7: Distribution on domains 2 | numelem = 4
      dis2: Distribution on domains 3 | numelem = 1192
  mesh4 "Mesh 4" [geom4]
    size: MeshSizeDefault | hmax = 4.09; hmin = 0.0183; hcurve = 0.3; hgrad = 1.3
    ftri1: FreeTri "Free Triangular 1" on remaining entities
      size1: Size on entire geometry
      dis1: Distribution on boundaries 9 | numelem = 1200

Studies
  std1 "Study 1"
    batsw: BatchSweep (disabled)
      sweeptype = filled
      pname = {temp, fr, ph}
      plistarr = {16, 225 625 1025 2000 4000 6000 10000, -1 1 -2 0 -1.5 0.5}
      punit = {, , }
      accumtable = new
      batchfile = HH_temperature_sweep_freq.mph
      synchsolutions = on
      clustersettings = on
      batchdir = D:\Ilya\COMSOL
      maxallow = 2
    time: Transient "Time Dependent" | tlist = range(0,0.01,40); usertol = on; rtol = 0.0001; physselection = g